// SBML level 3 version 1

model model1_tic()
  // model1.tic

  // Compartments:
  compartment DefaultCompartment = 1;

  // Species:
  species pp1_mrna in DefaultCompartment = 0;
  species p1 in DefaultCompartment = 1/DefaultCompartment;
  species pp5_mrna in DefaultCompartment = 0;
  species p5 in DefaultCompartment = 1/DefaultCompartment;
  species pp2_mrna in DefaultCompartment = 0;
  species p2 in DefaultCompartment = 1/DefaultCompartment;
  species pp6_mrna in DefaultCompartment = 0;
  species p6 in DefaultCompartment = 1/DefaultCompartment;
  species pp3_mrna in DefaultCompartment = 0;
  species p3 in DefaultCompartment = 1/DefaultCompartment;
  species pp4_mrna in DefaultCompartment = 0;
  species p4 in DefaultCompartment = 1/DefaultCompartment;

  // Parameters:
  p1_degradation_rate = 1;
  p2_degradation_rate = 1;
  p3_degradation_rate = 1;
  p4_degradation_rate = 1;
  p5_degradation_rate = 1;
  p6_degradation_rate = 1;
  pp4_mrna_degradation_rate = 1;
  pp2_mrna_degradation_rate = 1;
  rbs1_strength = 1;
  rbs2_strength = 1;
  rbs3_strength = 1;
  rbs4_strength = 1;
  rbs5_strength = 1;
  rbs6_strength = 1;
  pp5_mrna_degradation_rate = 1;
  pro1_strength = 1;
  pro2_strength = 1;
  pro3_strength = 1;
  pro4_strength = 1;
  pro5_strength = 1;
  pro6_strength = 1;
  pp3_mrna_degradation_rate = 1;
  v1_Kd = 1;
  v1_h = 1;
  v2_Kd = 1;
  v2_h = 1;
  v3_Kd = 1;
  v3_h = 1;
  v4_Kd = 1;
  v4_h = 1;
  v5_Kd = 1;
  v5_h = 1;
  v6_Kd = 1;
  v6_h = 1;
  v7_Kd = 1;
  v7_h = 1;
  v8_Kd = 1;
  v8_h = 1;
  pp6_mrna_degradation_rate = 1;
  pp1_mrna_degradation_rate = 1;

  // Assignment rules:
  rs1 := 1/(1 + (p6/v5_Kd)^v5_h);
  rs2 := 1/(1 + (p5/v8_Kd)^v8_h);
  rs3 := 1/(1 + (p4/v6_Kd)^v6_h);
  rs4 := 1/(1 + (p2/v4_Kd)^v4_h);
  rs5 := 1/(1 + (p4/v7_Kd)^v7_h);
  cod1 := pro1_strength;
  cod2 := pro2_strength*as1*rs1;
  cod3 := pro3_strength*as3*rs4;
  as1 := (1 + (p1/v2_Kd)^v2_h - 1)/(1 + (p1/v2_Kd)^v2_h);
  cod4 := pro4_strength*as2*rs2;
  as2 := (1 + (p1/v1_Kd)^v1_h - 1)/(1 + (p1/v1_Kd)^v1_h);
  cod5 := pro5_strength*rs3;
  as3 := (1 + (p1/v3_Kd)^v3_h - 1)/(1 + (p1/v3_Kd)^v3_h);
  cod6 := pro6_strength*rs5;

  // Reactions:
  pp1_v1: => pp1_mrna; cod1;
  pp1_v2: pp1_mrna => ; pp1_mrna_degradation_rate*pp1_mrna;
  pp1_v3: => p1; rbs1_strength*pp1_mrna;  // modifiers: pp1_mrna
  pp1_v4: p1 => ; p1_degradation_rate*p1;
  pp5_v1: => pp5_mrna; cod5;
  pp5_v2: pp5_mrna => ; pp5_mrna_degradation_rate*pp5_mrna;
  pp5_v3: => p5; rbs5_strength*pp5_mrna;  // modifiers: pp5_mrna
  pp5_v4: p5 => ; p5_degradation_rate*p5;
  pp2_v1: => pp2_mrna; cod2;
  pp2_v2: pp2_mrna => ; pp2_mrna_degradation_rate*pp2_mrna;
  pp2_v3: => p2; rbs2_strength*pp2_mrna;  // modifiers: pp2_mrna
  pp2_v4: p2 => ; p2_degradation_rate*p2;
  pp6_v1: => pp6_mrna; cod6;
  pp6_v2: pp6_mrna => ; pp6_mrna_degradation_rate*pp6_mrna;
  pp6_v3: => p6; rbs6_strength*pp6_mrna;  // modifiers: pp6_mrna
  pp6_v4: p6 => ; p6_degradation_rate*p6;
  pp3_v1: => pp3_mrna; cod3;
  pp3_v2: pp3_mrna => ; pp3_mrna_degradation_rate*pp3_mrna;
  pp3_v3: => p3; rbs3_strength*pp3_mrna;  // modifiers: pp3_mrna
  pp3_v4: p3 => ; p3_degradation_rate*p3;
  pp4_v1: => pp4_mrna; cod4;
  pp4_v2: pp4_mrna => ; pp4_mrna_degradation_rate*pp4_mrna;
  pp4_v3: => p4; rbs4_strength*pp4_mrna;  // modifiers: pp4_mrna
  pp4_v4: p4 => ; p4_degradation_rate*p4;
end
