// SBML level 2 version 1

model _model_9_genes_tic()
  // *model_9_genes.tic

  // Compartments:
  compartment DefaultCompartment = 1;

  // Species:
  species $as1 in DefaultCompartment;
  species $as2 in DefaultCompartment;
  species $as3 in DefaultCompartment;
  species $as5 in DefaultCompartment;
  species $as6 in DefaultCompartment;
  species $as7 in DefaultCompartment;
  species $as9 in DefaultCompartment;
  species $g1 in DefaultCompartment;
  species $g2 in DefaultCompartment;
  species $g3 in DefaultCompartment;
  species $g4 in DefaultCompartment;
  species $g5 in DefaultCompartment;
  species g6 in DefaultCompartment = 1;
  species $g7 in DefaultCompartment;
  species $g8 in DefaultCompartment;
  species $g9 in DefaultCompartment;
  species p1 in DefaultCompartment = 1;
  species p2 in DefaultCompartment = 1;
  species p3 in DefaultCompartment = 1;
  species p4 in DefaultCompartment = 1;
  species p5 in DefaultCompartment = 1;
  species p6 in DefaultCompartment = 1;
  species p7 in DefaultCompartment = 1;
  species p8 in DefaultCompartment = 1;
  species p9 in DefaultCompartment = 1;
  species pro1 in DefaultCompartment = 1;
  species pro2 in DefaultCompartment = 1;
  species pro3 in DefaultCompartment = 1;
  species pro4 in DefaultCompartment = 1;
  species pro5 in DefaultCompartment = 1;
  species pro6 in DefaultCompartment = 1;
  species pro7 in DefaultCompartment = 1;
  species pro8 in DefaultCompartment = 1;
  species pro9 in DefaultCompartment = 1;
  species rbs1 in DefaultCompartment = 1;
  species rbs2 in DefaultCompartment = 1;
  species rbs3 in DefaultCompartment = 1;
  species rbs4 in DefaultCompartment = 1;
  species rbs5 in DefaultCompartment = 1;
  species rbs6 in DefaultCompartment = 1;
  species rbs7 in DefaultCompartment = 1;
  species rbs8 in DefaultCompartment = 1;
  species rbs9 in DefaultCompartment = 1;
  species $rs1a in DefaultCompartment;
  species $rs1b in DefaultCompartment;
  species $rs2 in DefaultCompartment;
  species $rs3 in DefaultCompartment;
  species $rs7 in DefaultCompartment;
  species $rs8 in DefaultCompartment;
  species v1_mrna in DefaultCompartment = 0;
  species v2_mrna in DefaultCompartment = 0;
  species v3_mrna in DefaultCompartment = 0;
  species v4_mrna in DefaultCompartment = 0;
  species v5_mrna in DefaultCompartment = 0;
  species v6_mrna in DefaultCompartment = 0;
  species v7_mrna in DefaultCompartment = 0;
  species v8_mrna in DefaultCompartment = 0;
  species v9_mrna in DefaultCompartment = 0;

  // Parameters:
  v8_mrna_degradation_rate = 1;
  v9_mrna_degradation_rate = 1;
  p1_degradation_rate = 0.1;
  p2_degradation_rate = 0.1;
  p3_degradation_rate = 0.1;
  p4_degradation_rate = 0.1;
  p5_degradation_rate = 0.1;
  p6_degradation_rate = 0.1;
  p7_degradation_rate = 0.1;
  p8_degradation_rate = 0.1;
  p9_degradation_rate = 0.1;
  r1_Kd = 2.3432;
  r1_h = 2;
  r2_Kd = 1.342;
  r2_h = 2;
  r3_Kd = 1.774;
  r3_h = 2;
  r4_Kd = 0.262;
  r4_h = 2;
  r5_Kd = 0.568;
  r5_h = 2;
  r6_Kd = 2.6;
  r6_h = 4;
  r7_Kd = 1.54;
  r7_h = 2;
  r8_Kd = 0.12;
  r8_h = 2;
  r9_Kd = 1.13;
  r9_h = 2;
  v1_mrna_degradation_rate = 1;
  v2_mrna_degradation_rate = 1;
  pro1_strength = 0.67;
  pro2_strength = 1.42;
  pro3_strength = 5;
  pro4_strength = 1.5;
  pro5_strength = 1.3;
  v3_mrna_degradation_rate = 1;
  pro6_strength = 1;
  pro7_strength = 0.8;
  pro8_strength = 1.5;
  pro9_strength = 3.77;
  v4_mrna_degradation_rate = 1;
  r10_Kd = 1.4;
  r10_h = 2;
  r11_Kd = 2;
  r11_h = 2;
  r12_Kd = 0.2;
  r12_h = 2;
  r13_Kd = 0.5;
  r13_h = 4;
  v5_mrna_degradation_rate = 1;
  rbs1_strength = 2.1;
  rbs2_strength = 1.5;
  rbs3_strength = 5;
  rbs4_strength = 1.1;
  rbs5_strength = 0.8;
  v6_mrna_degradation_rate = 1;
  rbs6_strength = 5;
  rbs7_strength = 5;
  rbs8_strength = 5;
  rbs9_strength = 5;
  v7_mrna_degradation_rate = 1;

  // Assignment rules:
  as9 := (1 + (p6/r11_Kd)^r11_h - 1)/(1 + (p6/r11_Kd)^r11_h);
  g1 := (1 + (p1/r1_Kd)^r1_h - 1)/(1 + (p1/r1_Kd)^r1_h)*(1/(1 + (p2/r4_Kd)^r4_h)*1/(1 + (p6/r8_Kd)^r8_h));
  g2 := (1 + (p1/r2_Kd)^r2_h - 1)/(1 + (p1/r2_Kd)^r2_h)*(1/(1 + (p3/r3_Kd)^r3_h));
  g3 := (1 + (p4/r5_Kd)^r5_h - 1)/(1 + (p4/r5_Kd)^r5_h)*(1/(1 + (p5/r7_Kd)^r7_h));
  g4 := (1 + (p9/r9_Kd)^r9_h - 1)/(1 + (p9/r9_Kd)^r9_h);
  g5 := (1 + (p8/r13_Kd)^r13_h - 1)/(1 + (p8/r13_Kd)^r13_h);
  g7 := (1 + (p6/r12_Kd)^r12_h - 1)/(1 + (p6/r12_Kd)^r12_h)*(1/(1 + (p7/r6_Kd)^r6_h));
  g8 := 1/(1 + (p9/r10_Kd)^r10_h);
  g9 := (1 + (p6/r11_Kd)^r11_h - 1)/(1 + (p6/r11_Kd)^r11_h);
  rs1a := 1/(1 + (p2/r4_Kd)^r4_h);
  rs1b := 1/(1 + (p6/r8_Kd)^r8_h);
  rs2 := 1/(1 + (p3/r3_Kd)^r3_h);
  rs3 := 1/(1 + (p5/r7_Kd)^r7_h);
  rs7 := 1/(1 + (p7/r6_Kd)^r6_h);
  rs8 := 1/(1 + (p9/r10_Kd)^r10_h);
  as1 := (1 + (p1/r1_Kd)^r1_h - 1)/(1 + (p1/r1_Kd)^r1_h);
  as2 := (1 + (p1/r2_Kd)^r2_h - 1)/(1 + (p1/r2_Kd)^r2_h);
  as3 := (1 + (p4/r5_Kd)^r5_h - 1)/(1 + (p4/r5_Kd)^r5_h);
  as5 := (1 + (p8/r13_Kd)^r13_h - 1)/(1 + (p8/r13_Kd)^r13_h);
  as6 := (1 + (p9/r9_Kd)^r9_h - 1)/(1 + (p9/r9_Kd)^r9_h);
  as7 := (1 + (p6/r12_Kd)^r12_h - 1)/(1 + (p6/r12_Kd)^r12_h);

  // Reactions:
  v9_v1: => v9_mrna; pro8_strength*g8;  // modifiers: g8
  v9_v2: v9_mrna => ; v9_mrna_degradation_rate*v9_mrna;
  v9_v3: => p9; rbs9_strength*v9_mrna;  // modifiers: v9_mrna
  v9_v4: p9 => ; p9_degradation_rate*p9;
  v8_v1: => v8_mrna; pro9_strength*g7;  // modifiers: g7
  v8_v2: v8_mrna => ; v8_mrna_degradation_rate*v8_mrna;
  v8_v3: => p8; rbs7_strength*v8_mrna;  // modifiers: v8_mrna
  v8_v4: p8 => ; p8_degradation_rate*p8;
  v7_v1: => v7_mrna; pro7_strength*g9;  // modifiers: g9
  v7_v2: v7_mrna => ; v7_mrna_degradation_rate*v7_mrna;
  v7_v3: => p7; rbs8_strength*v7_mrna;  // modifiers: v7_mrna
  v7_v4: p7 => ; p7_degradation_rate*p7;
  v6_v1: => v6_mrna; pro6_strength*g6;  // modifiers: g6
  v6_v2: v6_mrna => ; v6_mrna_degradation_rate*v6_mrna;
  v6_v3: => p6; rbs6_strength*v6_mrna;  // modifiers: v6_mrna
  v6_v4: p6 => ; p6_degradation_rate*p6;
  v5_v1: => v5_mrna; pro5_strength*g5;  // modifiers: g5
  v5_v2: v5_mrna => ; v5_mrna_degradation_rate*v5_mrna;
  v5_v3: => p5; rbs5_strength*v5_mrna;  // modifiers: v5_mrna
  v5_v4: p5 => ; p5_degradation_rate*p5;
  v4_v1: => v4_mrna; pro4_strength*g4;  // modifiers: g4
  v4_v2: v4_mrna => ; v4_mrna_degradation_rate*v4_mrna;
  v4_v3: => p4; rbs4_strength*v4_mrna;  // modifiers: v4_mrna
  v4_v4: p4 => ; p4_degradation_rate*p4;
  v3_v1: => v3_mrna; pro3_strength*g3;  // modifiers: g3
  v3_v2: v3_mrna => ; v3_mrna_degradation_rate*v3_mrna;
  v3_v3: => p3; rbs3_strength*v3_mrna;  // modifiers: v3_mrna
  v3_v4: p3 => ; p3_degradation_rate*p3;
  v2_v1: => v2_mrna; pro2_strength*g2;  // modifiers: g2
  v2_v2: v2_mrna => ; v2_mrna_degradation_rate*v2_mrna;
  v2_v3: => p2; rbs2_strength*v2_mrna;  // modifiers: v2_mrna
  v2_v4: p2 => ; p2_degradation_rate*p2;
  v1_v1: => v1_mrna; pro1_strength*g1;  // modifiers: g1
  v1_v2: v1_mrna => ; v1_mrna_degradation_rate*v1_mrna;
  v1_v3: => p1; rbs1_strength*v1_mrna;  // modifiers: v1_mrna
  v1_v4: p1 => ; p1_degradation_rate*p1;
end
